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/batch
! ANSYS input file written by Workbench version 2020 R2
! File used for geometry attach: C:\Users\barba\Earthy\Group4_own_files\Structure_Domes\New_structure_options\Option 1_files\dp0\SYS\DM\SYS.agdb
/title,Option 1--Static Structural (A5)
/com,--- Data in consistent MKS units. See Solving Units in the help system for more information.
/units,MKS
/prep7
! Turn off shape checking because checks already performed inside WB mesher.
! See help system for more information.
SHPP,OFF,,NOWARN
etcon,set             ! allow ANSYS to choose best KEYOP's for 180x elements
/com,*********** Nodes for the whole assembly ***********
nblock,3,,20513
(1i9,3e20.9e3)
        1     9.600000000E+00     2.400000000E+00    -6.541639719E-06
        2     8.421330821E+00     4.786697876E+00    -1.178690134E+00
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-1
/com,*********** Elements for Body 1 "Solid" ***********
et,1,187
eblock,19,solid,,9447
(19i9)
        1        1        1        1        0        0        0        0       10        0        1      110      112     3157     3156     3878     3904     3889     3888
     3903    18645
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-1
/com,*********** Send User Defined Coordinate System(s) ***********
csys,0
toffst,273.15,  ! Temperature offset from absolute zero
/com,*********** Set Reference Temperature ***********
tref,22.
/com,*********** Send Materials ***********
MP,EX,1,150000000,	! Pa
MP,NUXY,1,0.35,
MP,DENS,1,1530,	! kg m^-3

!************************* Model Summary ********************
!Solid,	Adobe Brick,	matid,	1
!************************* End Model Summary ********************
/com,*********** Fixed Supports ***********
CMBLOCK,_FIXEDSU,NODE,      248
(8i10)
        61        64        65        74        77        78       102       105
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
cmsel,s,_FIXEDSU
d,all,all
nsel,all
/com,******* Constant Zero Displacement X *******
CMBLOCK,_DISPZEROUX,NODE,      251
(8i10)
        90        93        94       132       145       150       151       160
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cmsel,s,_DISPZEROUX
d,all,ux,0
nsel,all
/com,******* Constant Zero Displacement Y *******
CMBLOCK,_DISPZEROUY,NODE,      251
(8i10)
        90        93        94       132       145       150       151       160
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cmsel,s,_DISPZEROUY
d,all,uy,0
nsel,all
/com,*********** Define Pressure Using Surface Effect Elements ***********
et,2,154
eblock,10,,,1418
(15i9)
    15166        2        2        2        0      898      933      899      899     8593     8597      899     8591
    15167        2        2        2        0      895      930      896      896     8579     8582      896     8577
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-1
esel,s,type,,2
keyop,2,7,0                ! Use deformed area for application of load
esel,all
/com,*********** Define Pressure Using Surface Effect Elements ***********
et,3,154
eblock,10,,,1502
(15i9)
    16584        3        3        3        0     1698     1704     1711     1711    12807    12861     1711    12808
    16585        3        3        3        0     1703     1723     1724     1724    12853    12926     1724    12854
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-1
esel,s,type,,3
keyop,3,7,0                ! Use deformed area for application of load
esel,all
/com,*********** Define Pressure Using Surface Effect Elements ***********
et,4,154
eblock,10,,,1502
(15i9)
    18086        4        4        4        0     1698     1704     1711     1711    12807    12861     1711    12808
    18087        4        4        4        0     1703     1723     1724     1724    12853    12926     1724    12854
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-1
esel,s,type,,4
keyop,4,7,0                ! Use deformed area for application of load
esel,all
/com,*********** Define Pressure Vector Using Surface Effect Elements ***********
local,12,0,0.,0.,0.,0.,0.,0.
csys,0
et,5,154
eblock,10,,,1410
(15i9)
    19588        5        5        5       12     1064     1188     1187     1187     9559    10262     1187     9558
    19589        5        5        5       12     1068     1069     2842     2842     9588     9601     2842     9594
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-1
esel,s,type,,5
keyop,5,2,1                ! Apply load in local coordinate system
keyop,5,7,0                ! Use deformed area for application of load
keyop,5,11,2               ! Use real and not project area
esel,all
esel,all
fini
/com,****************************************************************************
/com,*************************    SOLUTION       ********************************
/com,****************************************************************************
/solu
antype,0                   ! static analysis
_thickRatio=  1     ! Ratio of thick parts in the model
eqsl,pcg,1e-8,,,,,,1
cntr,print,1               ! print out contact info and also make no initial contact an error
dmpoption,emat,no             ! Don't combine emat file for DANSYS
dmpoption,esav,no             ! Don't combine esav file for DANSYS
nldiag,cont,iter           ! print out contact info each equilibrium iteration
rescontrol,,none                 ! Do not keep any restart files
/com,****************************************************
/com,******************* SOLVE FOR LS 1 OF 1 ****************
esel,s,type,,2
nsle
sf,all,pres,366.
esel,s,type,,3
nsle
sf,all,pres,2880.
esel,s,type,,4
nsle
sf,all,pres,2070.91
nsel,all
esel,all
esel,s,type,,5
nsle
sfe,all,1,pres,1,0.
sfe,all,2,pres,1,0.
sfe,all,3,pres,1,-146.4
nsel,all
esel,all
acel,0.,9.80665,0.
esel,all
nsub,1,1,1
time,1.
outres,erase
outres,all,none
outres,nsol,all,
outres,rsol,all
outres,eangl,all
outres,etmp,all
outres,veng,all
outres,strs,all,
outres,epel,all,
outres,eppl,all,
outres,cont,all,
! *********** WB SOLVE COMMAND ***********
! check interactive state
*get,ANSINTER_,active,,int
*if,ANSINTER_,ne,0,then
/eof
*endif
solve
/com *************** Write FE CONNECTORS *********
CEWRITE,file,ce,,INTE
/com,****************************************************
/com,*************** FINISHED SOLVE FOR LS 1 *************
*get,_PCGITER,active,,solu,cgiter
/post1
fini
